**
** Heading +++++++++++++++++++++++++++++++++++++++++++++++++
**
*Heading
Hash: f9fx4bcl, Date: 05/13/2025, Unit system: MM_TON_S_C
**
** Nodes +++++++++++++++++++++++++++++++++++++++++++++++++++
**
*Node,  NSET=Nall
1, 4.70000000E-001, 0.00000000E+000, 0.00000000E+000
2, 4.70000000E-001, 5.00000000E-003, 0.00000000E+000
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**
** Elements ++++++++++++++++++++++++++++++++++++++++++++++++
**
*Element, Type=C3D10, Elset=Elems
1, 821, 900, 540, 822, 3622, 4015, 4016, 3385, 3623, 4017
2, 640, 384, 733, 732, 4018, 4019, 3107, 3105, 4020, 3109
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**
** Node sets +++++++++++++++++++++++++++++++++++++++++++++++
**
*Nset, Nset=Nchtnodes
1, 2, 3, 4, 5, 6
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*Nset, Nset=Internal-1_Sflux_interface
1, 2, 3, 4, 5, 6
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**
** Element sets ++++++++++++++++++++++++++++++++++++++++++++
**
*Elset, Elset=Echtelems
18, 47, 82, 83, 93, 94
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*Elset, Elset=Internal-1_Sflux_interface_S3
18, 158, 173, 206, 223, 323
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*Elset, Elset=Internal-1_Sflux_interface_S2
47, 157, 179, 180, 430, 482
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*Elset, Elset=Internal-1_Sflux_interface_S4
82, 83, 93, 94, 150, 229
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*Elset, Elset=Internal-1_Sflux_interface_S1
295, 364, 476, 481, 549, 559
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**
** Surfaces ++++++++++++++++++++++++++++++++++++++++++++++++
**
*Surface, Name=Sflux_interface, Type=Element
Internal-1_Sflux_interface_S3, S3
Internal-1_Sflux_interface_S2, S2
Internal-1_Sflux_interface_S4, S4
Internal-1_Sflux_interface_S1, S1
**
** Physical constants ++++++++++++++++++++++++++++++++++++++
**
**
** Coordinate systems ++++++++++++++++++++++++++++++++++++++
**
**
** Materials +++++++++++++++++++++++++++++++++++++++++++++++
**
*MATERIAL, NAME=S185
*ELASTIC
210000e6, 0.280
*CONDUCTIVITY
0.014
*EXPANSION
1.100e-05
*SPECIFIC HEAT
44e7

** conductivity / (density * Specific Heat) = 1
*DENSITY
7.8e-9
**
** Sections ++++++++++++++++++++++++++++++++++++++++++++++++
**
*SOLID SECTION, ELSET=Elems, MATERIAL=S185
**
** Pre-tension sections ++++++++++++++++++++++++++++++++++++
**
**
** Constraints +++++++++++++++++++++++++++++++++++++++++++++
**
**
** Surface interactions ++++++++++++++++++++++++++++++++++++
**
**
** Contact pairs +++++++++++++++++++++++++++++++++++++++++++
**
**
** Amplitudes ++++++++++++++++++++++++++++++++++++++++++++++
**
**
** Initial conditions ++++++++++++++++++++++++++++++++++++++
**
*INITIAL CONDITIONS,TYPE=TEMPERATURE
Nall, 500.0
**
** Steps +++++++++++++++++++++++++++++++++++++++++++++++++++
*STEP, INC=2000, nlgeom=NO
*HEAT TRANSFER, DIRECT
0.01,10.0

*BOUNDARY
NCHTNODES,11,11,500
*NODE FILE
NT
*End Step

**
