**
** Heading +++++++++++++++++++++++++++++++++++++++++++++++++
**
*Heading
Hash: YwTYV8g8, Date: 04/19/2025, Unit system: MM_TON_S_C
**
** Nodes +++++++++++++++++++++++++++++++++++++++++++++++++++
**
*Node
1, 4.70000000E-001, 2.00000000E-001, 0.00000000E+000
2, 4.70000000E-001, 1.97984200E-001, 0.00000000E+000
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**
** Elements ++++++++++++++++++++++++++++++++++++++++++++++++
**
*Element, Type=C3D10, Elset=Solid_part-1
1, 322, 370, 251, 366, 1463, 1475, 1476, 1420, 1473, 1477
2, 91, 293, 292, 173, 1173, 1175, 1171, 1478, 1479, 1480
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**
** Node sets +++++++++++++++++++++++++++++++++++++++++++++++
**
*Nset, Nset=Internal_Selection-1_Temperature-1
27, 28, 29, 30, 31, 32
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*Nset, Nset=sur1_nodes
27, 28, 29, 30, 31, 32
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*Nset, Nset=sur2_nodes
78, 79, 80, 81, 82, 83
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*Nset, Nset=sur4_nodes
52, 79, 132, 133, 134, 135
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**
** Element sets ++++++++++++++++++++++++++++++++++++++++++++
**
*Elset, Elset=sur1_elems
19, 20, 71, 107, 175, 232
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*Elset, Elset=sur4_elems
92, 186, 209, 234, 367, 373, 383, 479, 506, 550, 627, 698
*Elset, Elset=sur2_elems
21, 27, 51, 54, 70, 114
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**
** Surfaces ++++++++++++++++++++++++++++++++++++++++++++++++
*SURFACE, NAME=SolidInterface1, TYPE=ELEMENT, ELSET=sur1_elems, S1
*SURFACE, NAME=SolidInterface2, TYPE=ELEMENT, ELSET=sur2_elems, S2
*SURFACE, NAME=SolidInterface4, TYPE=ELEMENT, ELSET=sur4_elems, S4

**
**
** Physical constants ++++++++++++++++++++++++++++++++++++++
**
**
** Coordinate systems ++++++++++++++++++++++++++++++++++++++
**
**
** Materials +++++++++++++++++++++++++++++++++++++++++++++++
**
*MATERIAL, NAME=S185
*ELASTIC
210000, 0.300
*CONDUCTIVITY
100.000
*EXPANSION
1.200e-05
*SPECIFIC HEAT
100.0

** conductivity / (density * Specific Heat) = 1
*DENSITY
1.0

**INITIAL CONDITIONS
*INITIAL CONDITIONS,TYPE=TEMPERATURE
sur1_nodes,320
sur2_nodes,320
sur4_nodes,320


** Sections ++++++++++++++++++++++++++++++++++++++++++++++++
**
*Solid Section, elset=Solid_part-1, material=S185

** Pre-tension sections ++++++++++++++++++++++++++++++++++++
**
**
** Constraints +++++++++++++++++++++++++++++++++++++++++++++
**
**
** Surface interactions ++++++++++++++++++++++++++++++++++++
**
**
** Contact pairs +++++++++++++++++++++++++++++++++++++++++++
**
**
** Amplitudes ++++++++++++++++++++++++++++++++++++++++++++++
**
**
** Initial conditions ++++++++++++++++++++++++++++++++++++++
**
**
** Steps +++++++++++++++++++++++++++++++++++++++++++++++++++
**
*Step, name=HeatTransfer, nlgeom=NO
*Heat Transfer, steady state=NO
0.01,1,0

*BOUNDARY
sur1_nodes,11,11,320
sur2_nodes,11,11,320
sur4_nodes,11,11,320


*Output, field, frequency=1
*Node Output
NT
*End Step
